1/25*sqrt(1730.131/2) = 1.17648
29.412/25*sqrt((0.3^2*8 + 0.4^2*2 + 0.5^2*4 + 0.6^2*2 + 0.7^2*2 + 0.9^2*4)/22) = 0.662676
(0.6*29.412)^2 + (0.8*29.412)^2 + (0.9*29.412)^2 + (0.8*29.412)^2 + (0.7*29.412)^2 = 2543.29
2.748^2*4/(0.9*2.9412^2) = 3.87973
k_2 := 28.242/16*sqrt((1*3 + 0.7^2*1)/4) = 1.64876
1.649^2*4/(0.9*1.765^2) = 3.87944
1/20*sqrt(3151.538/4) = 1.40346
(0.9*29.412)^2*2 + 29.412^2*2 = 3131.54
(0.2*10 + 0.3*1 + 0.5*1 + 0.6*2 + 0.7*3 + 0.8*3 + 0.9*1 + 3*1)/1*213 = 2641.2
(0.3*8 + 0.4*2 + 0.5*4 + 0.6*2 + 0.7*2 + 0.9*4 + 2*1)/1*152 = 2036.8
(0.124 + 4678/10^4)^2*8760 = 3067.99
2*0.027*8760 + 0.12/2*(29.412/25)^2*3067.991 = 727.825
1.17*0.85/(29.412*0.85) = 0.0397797
0.04*500*3.184*10^-3*25*213/365*75 = 69.6773
29.412/10*sqrt((0.3^2*8 + 0.4^2*2 + 0.5^2*4 + 0.6^2*2 + 0.7^2*2 + 0.9^2*2)/14) = 1.81988
S := 29.412
(0.5*29.412)^2*4 + (0.4*29.412)^2*2 + (0.7*29.412)^2*2 + (0.9*29.412)^2*2 = 3391.06
0.1*sqrt(3391.058/4) = 2.91164
